a := 0
b := 1
y_1(x) := e^tan(x)
y_2(x) := x*asin(x)
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h := 0.5
xr := a, a + h .. b
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h := 0.2
xx[0] := a
n := (b - a)/h = 5
i := 0 .. n - 1
xx[i + 1] := xx[i] + h
xx = [0; 0.2; 0.4; 0.6; 0.8; 1]
vectorize(y_2(xx)) = [0; 0.0402716; 0.164607; 0.386101; 0.741836; 1.5708]
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y_1(x) + y_2(x) → e^tan(x) + x*asin(x)
y_1(x) - y_2(x) → e^tan(x) - x*asin(x)
y_1(x)*y_2(x) → x*asin(x)*e^tan(x)
y_1(x)/y_2(x) → e^tan(x)/(x*asin(x))
w(x) := y_1(x)
w(x) laplace, x → laplace(e^tan(x), x, s)
w(x) fourier, x →  # error: Символьный результат не найден.
w(x) ztrans, x → ztrans(e^tan(x), x, z)
d/dx(w(x)) → e^tan(x)*(tan(x)^2 + 1)
d^5/dx^5(w(x)) → 16*e^tan(x)*(tan(x)^2 + 1)^3 + 20*e^tan(x)*(tan(x)^2 + 1)^4 + e^tan(x)*(tan(x)^2 + 1)^5 + 88*e^tan(x)*tan(x)^2*(tan(x)^2 + 1)^2 + 100*e^tan(x)*tan(x)^2*(tan(x)^2 + 1)^3 + 120*e^tan(x)*tan(x)^3*(tan(x)^2 + 1)^2 + 120*e^tan(x)*tan(x)*(tan(x)^2 + 1)^3 + 20*e^tan(x)*tan(x)*(tan(x)^2 + 1)^4 + 16*e^tan(x)*tan(x)^4*(tan(x)^2 + 1)
integral(w(x), x) → integral(e^tan(x), x)
A := [5, 15, 25; 3, 10, 2; 1, 30, 2]
A[1, 1] = 10
|A| = 1740
AT := transpose(A)
AT = [5, 3, 1; 15, 10, 30; 25, 2, 2]
AZ := A^-1
AZ = [
    -0.0229885, 0.413793, -0.126437;
    -0.00229885, -0.00862069, 0.0373563;
    0.045977, -0.0775862, 0.00287356
]
A0 := A[:, 0]
A1 := A[:, 1]
A2 := A[:, 2]
A0 := A[:, 0]
A0 = [5; 3; 1]
A1 = [15; 10; 30]
A2 = [25; 2; 2]
sum(A0) = 9
sum(A1) = 55
sum(A2) = 29
A1*A2 = 455
A1×A2 = [-40; 720; -220]
# [component: inputs A]
# [component: inputs A]
# [component: inputs A]
# [component: inputs A]
